// COMSOL Multiphysics 5.4.0.388 model "strong_acid_2D_uniaxial_def.mph"
// Outline of the model tree
// Unit system: none

Parameters
  beta = 4*1e-9
  xi_cu = 15  // diffusivty of copper in the gel
  r = 12500  // reaction rate
  xi_h = 750  // diffusivity of acid in the gel
  phiac = 0.036  // maximum backbone volume fraction
  gamma = 5.2389
  chi = 2.6194
  zeta_cu = 25  // diffusivity of the copper in sup
  zeta_h = 750  // diffusivity of the acid in sup
  alpha_y = 770  // supernatant domain size
  alpha_x = 2500  // gel horizontal scale
  mu = 0.25
  lambda = 0.5
  phi_p = 0.04  // polymer backbone concentration
  k1 = 1000
  eta = 0.225

Functions
  step1: Step | smooth = 0.001
  step2: Step | location = 1.1
  rect2: Rectangle | lower = 2.4995; upper = 2.5005; smooth = 0.000001
  rect3: Rectangle | lower = 2.499; upper = 2.501; smooth = 0.000001

Geometry
  geom1 "Geometry 1" (2D, length unit m)
    r1: Rectangle
    r2: Rectangle | pos = {0, 1.0}
    fin: Finalize "Form Union"

Physics
  w: WeakFormPDE "stokes flow" on domains 2
    dependent variable u = {u1, u2}
    ShapeProperty.shapeFunctionType = shlag
    ShapeProperty.order = 2
    Units.SourceTermQuantity = none
    Units.CustomSourceTermUnit = 1
    wfeq1: WeakFormPDE (default)
      weak = {(beta*alpha_y/(alpha_x*alpha_x))*test(u1x)*u1x + (beta/alpha_y)*test(u1y)*u1y - alpha_y*test(u1x)*u3, (beta/alpha_x)*test(u2x)*u2x + (beta*alpha_x/(alpha_y*alpha_y))*test(u2y)*u2y - alpha_x*test(u2y)*u3}
    zflx1: ZeroFluxBoundary "Zero Flux 1" (default)
    init1: init "Initial Values 1" (default) | u2 = 1e-6; u1 = 1e-6
    dir1: DirichletBoundary "Dirichlet Boundary Condition 1" on boundaries 5 | r = {0, 0}
    wc2: WeakConstraint on boundaries 4
      constraintType = symmetricConstraint
      constraintExpression = (u2/alpha_y) - u5t + u6y
      integrationOrder = 4
      automaticQuadrature = 1
      initialValue = 0
      order = 1
    wc1: WeakConstraint on boundaries 4
      constraintType = symmetricConstraint
      constraintExpression = (u1/alpha_x) - u4t*alpha_x + u6x/alpha_x
      integrationOrder = 4
      automaticQuadrature = 1
      shapeFunctionType = shlag
      order = 1
    pc1: PeriodicCondition on boundaries 3, 7 | destinationDomains: boundaries 7
  w2: WeakFormPDE "incompressibility" on domains 2
    dependent variable u3
    ShapeProperty.order = 1
    Units.CustomSourceTermUnit = 1
    wfeq1: WeakFormPDE (default) | weak = -(alpha_y/alpha_x)*test(u3)*u1x - (alpha_x/alpha_y)*test(u3)*u2y
    zflx1: ZeroFluxBoundary "Zero Flux 1" (default)
    init1: init "Initial Values 1" (default) | u3 = 1e-6
    pc1: PeriodicCondition on boundaries 3, 7 | destinationDomains: boundaries 7
    dir1: DirichletBoundary "Dirichlet Boundary Condition 1" on boundaries 5 | r = 0
  w3: WeakFormPDE "Gel deformation" on domains 1
    dependent variable def = {u4, u5}
    ShapeProperty.shapeFunctionType = shlag
    ShapeProperty.order = 1
    Units.CustomSourceTermUnit = 1
    wfeq1: WeakFormPDE (default)
      weak = {(2*mu+lambda)*u4x*test(u4x) +mu*alpha_x*alpha_x*u4y*test(u4y) + mu*alpha_x*u4y*test(u5x) + lambda*alpha_x*u4x*test(u5y) - (u6+k1*eta*u8+k1*phi_p*phi_p*0.5 -chi*u11-gamma*u9)*(test(u4x)+alpha_x*test(u5y)), mu*u5x*test(u4y) + (mu/alpha_x)*u5x*test(u5x) + (2*mu+lambda)*alpha_x*u5y*test(u5y) + lambda*u5y*test(u4x)}
    zflx1: ZeroFluxBoundary "Zero Flux 1" (default)
    init1: init "Initial Values 1" (default) | u4 = 1e-6; u5 = -0.0943*y
    flux1: FluxBoundary "Flux/Source 1" on boundaries 4
      g = {-(beta/alpha_y)*u2x, alpha_x*u3-beta*(alpha_x/(alpha_y*alpha_y))*u2y}
    dir1: DirichletBoundary "Dirichlet Boundary Condition 1" on boundaries 2 | r = {0, 0}
    pc1: PeriodicCondition on boundaries 1, 6 | destinationDomains: boundaries 6
  w4: WeakFormPDE "Darcy flow" on domains 1
    dependent variable u6
    ShapeProperty.shapeFunctionType = shlag
    ShapeProperty.order = 1
    Units.CustomSourceTermUnit = 1
    wfeq1: WeakFormPDE (default)
      weak = -d(u4t,x)*test(u6)*alpha_x - d(u5t,y)*test(u6)*alpha_x -(1/alpha_x)*u6x*test(u6x) - alpha_x*u6y*test(u6y)
    zflx1: ZeroFluxBoundary "Zero Flux 1" (default)
    init1: init "Initial Values 1" (default) | u6 = -0.8
    dir1: DirichletBoundary "Dirichlet Boundary Condition 1" on boundaries 4 | r = u3-k1*phi_p*phi_p*0.5-k1*eta*u8
    pc1: PeriodicCondition on boundaries 1, 6 | destinationDomains: boundaries 6
  w6: WeakFormPDE "Free copper in the gel" on domains 1
    dependent variable u8
    ShapeProperty.order = 1
    Units.CustomSourceTermUnit = 1
    wfeq1: WeakFormPDE (default)
      weak = alpha_x*u8t*test(u8) + (1/alpha_x)*xi_cu*test(u8x)*u8x + xi_cu*alpha_x*test(u8y)*u8y - alpha_x* r*u10*u9*test(u8) + alpha_x* r*u8*(phiac-2*u9-u11)*test(u8) - ((alpha_x)*u4t-(1/alpha_x)*u6x)*u8*test(u8x) - alpha_x*(u5t-u8y)*u8*test(u8y)
    zflx1: ZeroFluxBoundary "Zero Flux 1" (default)
    init1: init "Initial Values 1" (default)
    flux1: FluxBoundary "Flux/Source 1" on boundaries 4 | g = -(alpha_x/alpha_y)*zeta_cu*u12y + (u2/alpha_y)*u12*alpha_x
    pc1: PeriodicCondition on boundaries 1, 6 | destinationDomains: boundaries 6
  w7: WeakFormPDE "bound copper" on domains 1
    dependent variable u9
    ShapeProperty.order = 1
    Units.CustomSourceTermUnit = 1
    wfeq1: WeakFormPDE (default) | weak = u9t*test(u9)+r*u10*u9*test(u9) - r*u8*(phiac-2*u9-u11)*test(u9)
    zflx1: ZeroFluxBoundary "Zero Flux 1" (default)
    init1: init "Initial Values 1" (default) | u9 = phiac/2
    pc1: PeriodicCondition on boundaries 1, 6 | destinationDomains: boundaries 6
  w8: WeakFormPDE "Free acid in the gel" on domains 1
    dependent variable u10
    ShapeProperty.order = 1
    Units.CustomSourceTermUnit = 1
    wfeq1: WeakFormPDE (default)
      weak = alpha_x*u10t*test(u10) + (1/alpha_x)*xi_h*test(u10x)*u10x + alpha_x*xi_h*test(u10y)*u10y + alpha_x*r*u10*(phiac-u11)*test(u10) - (alpha_x*u4t-(1/alpha_x)*u6x)*u10*test(u10x) - alpha_x*(u5t-u6y)*u10*test(u10y)
    zflx1: ZeroFluxBoundary "Zero Flux 1" (default)
    init1: init "Initial Values 1" (default)
    pc1: PeriodicCondition on boundaries 1, 6 | destinationDomains: boundaries 6
    flux1: FluxBoundary "Flux/Source 1" on boundaries 4 | g = -(alpha_x/alpha_y)*zeta_h*u13y + (u2/alpha_y)*u13*alpha_x
  w9: WeakFormPDE "bound acid" on domains 1
    dependent variable u11
    ShapeProperty.order = 1
    Units.CustomSourceTermUnit = 1
    wfeq1: WeakFormPDE (default) | weak = u11t*test(u11)-r*u10*(phiac-u11)*test(u11)
    zflx1: ZeroFluxBoundary "Zero Flux 1" (default)
    init1: init "Initial Values 1" (default)
    pc1: PeriodicCondition on boundaries 1, 6 | destinationDomains: boundaries 6
  w10: WeakFormPDE "Free copper in the supernatant domain" on domains 2
    dependent variable u12
    ShapeProperty.order = 1
    Units.CustomSourceTermUnit = 1
    wfeq1: WeakFormPDE (default)
      weak = alpha_x*alpha_y*u12t*test(u12) + (alpha_y/alpha_x)*zeta_cu*test(u12x)*u12x + (alpha_x/alpha_y)*zeta_cu*test(u12y)*u12y - (alpha_y/alpha_x)*u1*u12*test(u12x) - (alpha_x/alpha_y)*u2*u12*test(u12y)
    zflx1: ZeroFluxBoundary "Zero Flux 1" (default)
    init1: init "Initial Values 1" (default) | u12 = 0
    pc1: PeriodicCondition on boundaries 3, 7 | destinationDomains: boundaries 7
    dir1: DirichletBoundary "Dirichlet Boundary Condition 1" on boundaries 4 | r = u8
  w11: WeakFormPDE "Free acid in the supernatant domain" on domains 2
    dependent variable u13
    ShapeProperty.order = 1
    Units.CustomSourceTermUnit = 1
    wfeq1: WeakFormPDE (default)
      weak = alpha_x*alpha_y*u13t*test(u13) + (alpha_y/alpha_x)*zeta_h*test(u13x)*u13x + (alpha_x/alpha_y)*zeta_h*test(u13y)*u13y - (alpha_y/alpha_x)*u1*u13*test(u13x) - (u2*alpha_x/alpha_y)*u13*test(u13y)
    zflx1: ZeroFluxBoundary "Zero Flux 1" (default)
    init1: init "Initial Values 1" (default) | u13 = 0.006*0.5*(1+tanh(125*(y-1.04)))
    pc1: PeriodicCondition on boundaries 3, 7 | destinationDomains: boundaries 7
    dir1: DirichletBoundary "Dirichlet Boundary Condition 1" on boundaries 4 | r = u10

Mesh
  mesh1 "Mesh 1"
    size: MeshSizeDefault | table = cfd; hmax = 0.013; hmin = 1.5E-4; hgrad = 1.08; hauto = 2
    ftri1: FreeTri "Free Triangular 1" on entire geometry
      se1: SizeExpression (disabled) on domains 2 | sizeexpr = 0.0005*exp(8*(y-1))
      size1: Size on boundaries 4 | table = cfd; hmax = 0.0004; hmin = 1.0E-5; hauto = 1; custom = on
      size3: Size (disabled) on points 2, 5 | table = cfd; hmax = 0.0005; hauto = 1; custom = on
      size4: Size (disabled) on boundaries 2 | table = cfd; hmax = 0.001; hgrad = 1.05; hauto = 1; custom = on
    bl1: BndLayer "Boundary Layers 1" on domains 2
      blp1: BndLayerProp "Boundary Layer Properties 1" on boundaries 4
    bl2: BndLayer "Boundary Layers 2" on domains 1
      blp: BndLayerProp "Boundary Layer Properties" on boundaries 2 | blnlayers = 16

Studies
  std1 "Study 1"
    stat: Stationary | solve for = {w, w2, w3, w4}
    time: Transient "Time Dependent" | tlist = range(0,0.05,12); usertol = on; rtol = 0.001

Solver configurations
  sol1 "Solution 1" (study std1)
    v1: Variables "Dependent Variables 1"
    s1: Stationary "Stationary Solver 1"
      dDef: Direct
      fc1: FullyCoupled | linsolver = dDef
    su1: StoreSolution
    v2: Variables "Dependent Variables 2" | initmethod = sol; notsolmethod = sol
    t1: Time "Time-Dependent Solver 1" | tlist = range(0,0.05,12); maxstepbdf = 0.001
      dDef: Direct
      fc1: FullyCoupled | linsolver = dDef
  sol2 "Solution Store 1" (study std1)

Datasets
  mesh1: Mesh | mesh = mesh1
  dset1: Solution | solution = sol1
  dset2: Solution | solution = sol2
  cln1: CutLine2D | data = dset1; genpoints = {{0.4999, 1}, {0.5001, 1}}; bndsnap = on

Derived values
  av1: AvLine "hydrogel height" | data = cln1; expr = y + u5